<?xml version="1.0" ?>
<Node name="root" dt="0.1" gravity="0 0 -9.81 " >
    <RequiredPlugin name="SofaOpenglVisual"/>
    <RequiredPlugin pluginName='SofaHaptics'/>
	<RequiredPlugin pluginName='SofaSparseSolver'/>
    <VisualStyle displayFlags="hideBehaviorModels hideCollisionModels hideMappings hideForceFields" />
    <RequiredPlugin name="Geomagic plugin" pluginName="Geomagic" />

    <DefaultPipeline name="pipeline" depth="6" verbose="0"/>
    <BruteForceDetection name="detection" />
    <DefaultContactManager name="response" response="FrictionContact" />
    <LocalMinDistance name="proximity" alarmDistance="0.15" contactDistance="0.05" angleCone="0.0" />
    <FreeMotionAnimationLoop/>
    <LCPConstraintSolver tolerance="0.001" maxIt="1000"/>
    <GeomagicDriver name="GeomagicDevice" deviceName="Default Device" scale="1" drawDeviceFrame="0" positionBase="0 0 8" drawDevice="0" orientationBase="0.707 0 0 0.707"  />

	<Node name="Hexahedra Mesh">
		<EulerImplicitSolver name="cg_odesolver" printLog="0"  rayleighStiffness="0.1" rayleighMass="0.1" />
		<CGLinearSolver template="GraphScattered" name="linear solver" iterations="40" tolerance="1e-09" threshold="1e-09" />

		<MechanicalObject template="Vec3d" name="Hexa" scale3d="2 1 0.2" position="0 0 8"/>
		<RegularGridTopology name="grid" n="10 10 2" min="-10 -10 -10" max="10 10 10" p0="-10 -10 -10" />
		<HexahedronSetGeometryAlgorithms />
		<DiagonalMass template="Vec3d" name="Mass" massDensity="2.0" />
		<HexahedronFEMForceField template="Vec3d" name="FEM" poissonRatio="0.45" youngModulus="2000" />
		<PrecomputedConstraintCorrection recompute="true"/>

		<FixedConstraint template="Vec3d" name="Fixed Dofs" indices="0 4 20 24  70 74" drawSize="0" />
		<FixedPlaneConstraint template="Vec3d" name="defaultPlane" direction="0 0 1" dmin="-15"/>

		<Node name="Quad Mesh">
			<QuadSetTopologyContainer name="Container" />
			<QuadSetTopologyModifier name="Modifier" />
			<QuadSetTopologyAlgorithms template="Vec3d" name="TopoAlgo" />
			<QuadSetGeometryAlgorithms template="Vec3d" name="GeomAlgo" />
			<Hexa2QuadTopologicalMapping name="default6" input="@../grid" output="@Container" />
			<Node name="Triangles Mesh" gravity="0 -9.81 0">
				<TriangleSetTopologyContainer name="Container" />
				<TriangleSetTopologyModifier name="Modifier" />
				<TriangleSetTopologyAlgorithms template="Vec3d" name="TopoAlgo" />
				<TriangleSetGeometryAlgorithms template="Vec3d" name="GeomAlgo" />
				<Quad2TriangleTopologicalMapping name="default8" input="@../Container" output="@Container" />
				<TriangularBendingSprings template="Vec3d" name="FEM-Bend" stiffness="200" damping="1" />
				<TriangleCollisionModel name="default9" />
				<Node name="Visu">
					<OglModel template="ExtVec3f" name="Visual" color="1 0.75 0.796" material="Default Diffuse 1 0 0 1 1 Ambient 1 0 0 0.2 1 Specular 0 0 0 1 1 Emissive 0 0 0 1 1 Shininess 0 45 "/>
					<IdentityMapping template="Vec3d,ExtVec3f" name="default12" input="@.." output="@Visual" />
				</Node>
			</Node>
		</Node>
	</Node>
    <Node name="Omni">
        <MechanicalObject template="Rigid3" name="DOFs" position="@GeomagicDevice.positionDevice"/>
        <MechanicalStateController template="Rigid3" listening="true" mainDirection="-1.0 0.0 0.0" handleEventTriggersUpdate="true"/>
    </Node>

	<Node name="Instrument" >
        <EulerImplicitSolver name="ODE solver" rayleighStiffness="0.01" rayleighMass="0.01" />
        <SparseLDLSolver />

		<MechanicalObject name="instrumentState" template="Rigid3" />
		<UniformMass name="mass" totalMass="0.5" />

		<RestShapeSpringsForceField stiffness='1000' angularStiffness='1000' external_rest_shape='@../Omni/DOFs' points='0' external_points='0'/>
        <LCPForceFeedback name="LCPFF1" activate="true" forceCoef="0.1"/>
        <LinearSolverConstraintCorrection />

		<Node name="VisuTool" >
            <MeshSTLLoader name="STLLoader" filename="mesh/Scalpel.stl" scale="0.1" printLog="true" flipNormals="0" />
			<OglModel name="InstrumentVisualModel" src="@STLLoader"  rx="0" ry="-90" rz="90" dz="-2" dx="0" dy="0.5"/>
            <RigidMapping name="MM->VM mapping" input="@instrumentState" output="@InstrumentVisualModel" />
        </Node>

        <Node name="CollisionModel" >
			<Node name="Scalple">
                <MeshSTLLoader name="STLLoader" filename="mesh/Scalpel.stl" scale="0.1" printLog="true" flipNormals="0" />
				<MeshTopology src="@STLLoader" name="InstrumentCollisionModel" />
				<MechanicalObject src="@STLLoader" name="instrumentCollisionState"  rx="0" ry="-90" rz="90" dz="-2" dx="0" dy="0.5" />
                <LineCollisionModel contactStiffness="10" group="1" simulated="0" moving="1"/>
                <PointCollisionModel contactStiffness="10" group="1" simulated="0" moving="1"/>
				<TriangleCollisionModel template="Vec3d" name="Triangles" />
                <RigidMapping name="MM->CM mapping" input="@instrumentState" output="@instrumentCollisionState" />
            </Node>

		</Node>
    </Node>
</Node>
